// P-T curve is per unit of rated Pmpp vs temperature

// This one is for a Pmpp stated at 25 deg

New XYCurve.MyPvsT npts=4  xarray=[0  25  75  100]  yarray=[1.2 1.0 0.8  0.6]

// efficiency curve is per unit eff vs per unit power

New XYCurve.MyEff npts=4  xarray=[.1  .2  .4  1.0]  yarray=[.86  .9  .93  .97]

// 24-hr temp shape curve

New Tshape.MyTemp npts=96 minterval=15 temp=[25,25,25,25,25,27.5,30,32.5,35,36.25,37.5,38.75,40,41.25,42.5,43.75,45,46.25,47.5,48.75,50,52.5,55,57.5,60,60,60,60,60,58.75,57.5,56.25,55,51.25,47.5,43.75,40,38.75,37.5,36.25,35,33.75,32.5,31.25,30,28.75,27.5,26.25,25,25,25,25,25,25,25,25,25,25,25,25,25,25,25,25,25,25,25,25,25,25,25,25,25,25,25,25,25,25,25,25,25,25,25,25,25,25,25,25,25,25,25,25,25,25,25,25]
